<?xml version="1.0"?>

<!--
  File:     ROTAX912ULS.xml
  Author:   Salvatore De Astis (SDeAstis)

  See: http://wiki.flightgear.org/JSBSim_Engines#FGPiston

  Inputs:
    name:           ROTAX912ULS
    type:           Piston Engine
    power:          100 hp
-->

<piston_engine name="ROTAX912ULS">
  <minmp unit="INHG">			18.0	</minmp>				<!--SHOULD BE OK-->
  <maxmp unit="INHG">			28.0	</maxmp>				<!--OK-->
  <displacement unit="IN3">		82.6	</displacement>			<!--OK-->
  <maxhp>					   100.0	</maxhp>				<!--OK-->
  <cycles>						 4.0	</cycles>				<!--OK-->
  <idlerpm>					  1400.0	</idlerpm>				<!--OK-->
  <maxrpm>					  5800.0	</maxrpm>				<!--OK-->
  <sparkfaildrop>				 0.1	</sparkfaildrop>		<!--UNKNOWN???-->
  <volumetric-efficiency>		 0.85	</volumetric-efficiency><!--UNKNOWN???-->
  <man-press-lag>				 0.1	</man-press-lag>		<!--UNKNOWN???-->
  <static-friction  unit="HP">	 0.493	</static-friction>		<!--UNKNOWN???-->
  <starter-torque>				78.8508	</starter-torque>		<!--UNKNOWN???-->
  <starter-rpm>				  1400		</starter-rpm>			<!--UNKNOWN???-->
  <stroke unit="IN">			 2.40	</stroke>				<!--OK-->
  <bore unit="IN">				 3.13	</bore>					<!--OK-->
  <cylinders>					 4		</cylinders>			<!--OK-->
  <compression-ratio>			10.8	</compression-ratio>	<!--OK-->
</piston_engine>
